mN := N*10^-3
m_i(i) := {
    if i == 1
        30
    else if i == 2
        (30 + 60)/2 + 2000/0.02
    else if i == 3
        60
    else if i == 4
        40
    else if i == 5
        30
    else if i == 6
        3500
    else if i == 7
        50
    else if i == 8
        35
    else if i == 9
        2500
    else if i == 10
        (2500 + 50)/2 + 2000/0.02
    else if i == 11
        50
}*kg/m
EJ_i(i) := {
    if i == 1
        40
    else if i == 2
        (40 + 90)/2
    else if i == 3
        90
    else if i == 4
        60
    else if i == 5
        44
    else if i == 6
        44
    else if i == 7
        60
    else if i == 8
        55
    else if i == 9
        55
    else if i == 10
        (55 + 60)/2 + 3000
    else if i == 11
        60
}*mN*m^2
x(i) := {
    if i == 1
        1.7 - 0.01
    else if i == 2
        1.7 + 0.01
    else if i == 3
        3.5
    else if i == 4
        4
    else if i == 5
        7
    else if i == 6
        10
    else if i == 7
        11
    else if i == 8
        15
    else if i == 9
        19 - 0.01
    else if i == 10
        19 + 0.01
    else if i == 11
        21
}*m
b_i(ω, i) := nthroot(ω^2*m_i(i)/EJ_i(i), 4)
S(x, ω, i) := 1/2*(cosh(b_i(ω, i)*x) + cos(b_i(ω, i)*x))
T(x, ω, i) := 1/2*(sinh(b_i(ω, i)*x) + sin(b_i(ω, i)*x))
U(x, ω, i) := 1/2*(cosh(b_i(ω, i)*x) - cos(b_i(ω, i)*x))
V(x, ω, i) := 1/2*(sinh(b_i(ω, i)*x) - sin(b_i(ω, i)*x))
A_i(x, ω, i) := [
    S(x, ω, i), T(x, ω, i)/b_i(ω, i), U(x, ω, i)/(EJ_i(i)*b_i(ω, i)^2), V(x, ω, i)/(EJ_i(i)*b_i(ω, i)^3);
    V(x, ω, i)*b_i(ω, i), S(x, ω, i), T(x, ω, i)/(EJ_i(i)*b_i(ω, i)), U(x, ω, i)/(EJ_i(i)*b_i(ω, i)^2);
    U(x, ω, i)*EJ_i(i)*b_i(ω, i)^2, V(x, ω, i)*EJ_i(i)*b_i(ω, i), S(x, ω, i), T(x, ω, i)/b_i(ω, i);
    V(x, ω, i)*EJ_i(i)*b_i(ω, i)^3, U(x, ω, i)*EJ_i(i)*b_i(ω, i)^2, V(x, ω, i)*b_i(ω, i), S(x, ω, i)
]
A_i(ω, i) := A_i(x(i), ω, i)
A_i(1/s, 1)*A_i(1/s, 2)*A_i(1/s, 3) = [
    5.59968e38, 1.10201e38 m, 2.40972e38 1/N, 4.7423e37 s^2/kg;
    2.93137e39 1/m, 5.76891e38, 1.26146e39 1/J, 2.48254e38 1/N;
    6.13541e38 N, 1.20744e38 J, 2.64026e38, 5.19601e37 m;
    3.20971e39 kg/s^2, 6.31668e38 N, 1.38124e39 1/m, 2.71827e38
]
P(ω) := product(A_i(ω, i), i = 1 .. 11)
P(1/s) =  # error: Неизвестная ошибка: floating_point_exception.
D(ω) := P(ω)[2, 0]*P(ω)[3, 1] - P(ω)[2, 1]*P(ω)[3, 0]
D(1/s) =  # error
b_i(1/s, 1) = 5.23318 1/m
ω := 0 rad/s, 1*rad/s .. 10*rad/s
# [plot: D(ω) vs ω]
